*Heading
** Job name: test_pre_traitement Model name: test_pre_traitement
** Generated by: Abaqus/CAE 2022
*Preprint, echo=NO, model=NO, history=NO, contact=NO
**
** PARTS
**
*Part, name=Part-1
*Node
      1,           0.,           0.
      2,           5.,           0.
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*Element, type=C2D4
 1,  1,  2, 13, 12
 2,  2,  3, 14, 13
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*Nset, nset=Set-1, generate
  1,  66,   1
*Elset, elset=Set-1, generate
  1,  50,   1
** Section: Section-1
*Solid Section, elset=Set-1, material=elastique
,
*End Part
**
**
** ASSEMBLY
**
*Assembly, name=Assembly
**
*Instance, name=Part-1-1, part=Part-1
*End Instance
**
*Nset, nset=Set-embedding, instance=Part-1-1, generate
  1,  56,  11
*Nset, nset=Set-load, instance=Part-1-1, generate
 11,  66,  11
*End Assembly
**
** MATERIALS
**
*Material, name=elastique
*Density
 7.8e-09,
*Elastic
210000., 0.33
** ----------------------------------------------------------------
**
** STEP: Step-1
**
*Step, name=Step-1, nlgeom=YES
*Dynamic, Explicit
, 0.001
*Bulk Viscosity
0.06, 1.2
**
** BOUNDARY CONDITIONS
**
** Name: BC-1 Type: Velocity/Angular velocity
*Boundary, type=VELOCITY
Set-embedding, 1, 1
Set-embedding, 2, 2
Set-embedding, 6, 6
** Name: BC-2 Type: Velocity/Angular velocity
*Boundary, type=VELOCITY
Set-load, 1, 1, 1000.
Set-load, 6, 6
**
** LOADS
**
** Name: Load-1   Type: Concentrated force
*Cload
Set-load, 1, 1000.
**
** OUTPUT REQUESTS
**
*Restart, write, number interval=1, time marks=NO
**
** FIELD OUTPUT: F-Output-1
**
*Output, field, variable=PRESELECT
**
** HISTORY OUTPUT: H-Output-1
**
*Output, history, variable=PRESELECT
*End Step
